import Sofa

import os
path = os.path.dirname(os.path.abspath(__file__))+'/mesh/'

# Units: mm, kg, s.     Pressure in kPa = k (kg/(m.s^2)) = k (g/(mm.s^2) =  kg/(mm.s^2)

def createScene(rootNode):

                rootNode.createObject('RequiredPlugin', pluginName='SoftRobots')
                rootNode.createObject('RequiredPlugin', pluginName='SofaPython')
                rootNode.createObject('RequiredPlugin', pluginName='ModelOrderReduction')
                rootNode.findData('gravity').value='0 0 -9810'
                rootNode.createObject('VisualStyle', displayFlags='showVisualModels showBehaviorModels hideCollisionModels hideBoundingCollisionModels showForceFields showInteractionForceFields hideWireframe')

                rootNode.createObject('FreeMotionAnimationLoop')
                rootNode.createObject('GenericConstraintSolver', printLog='0', tolerance="1e-15", maxIterations="5000")
                rootNode.createObject('CollisionPipeline', verbose="0")
                rootNode.createObject('BruteForceDetection', name="N2")
                rootNode.createObject('RuleBasedContactManager', name="Response", response="FrictionContact", rules="0 * FrictionContact?mu=0.5" )
                rootNode.createObject('CollisionResponse', response="FrictionContact", responseParams="mu=0.7")
                rootNode.createObject('LocalMinDistance', name="Proximity", alarmDistance="2.5", contactDistance="0.5", angleCone="0.01")

                rootNode.createObject('BackgroundSetting', color='0 0.168627 0.211765')
                rootNode.createObject('OglSceneFrame', style="Arrows", alignment="TopRight")

                fineModel = True
                if (fineModel):
                    quadrupedMesh = "full_quadriped_fine.vtk"
                    centerCavityMesh = "quadriped_Center-cavity_finer.stl"
                    rearLeftCavityMesh = "quadriped_Rear-Left-cavity_finer.stl"
                    rearRightCavityMesh = "quadriped_Rear-Right-cavity_finer.stl"
                    frontLeftCavityMesh = "quadriped_Front-Left-cavity_finer.stl"
                    frontRightCavityMesh = "quadriped_Front-Right-cavity_finer.stl"
                else:
                    quadrupedMesh = "full_quadriped_SMALL.vtk"
                    centerCavityMesh = "quadriped_Center-cavityREMESHEDlighter.stl"
                    rearLeftCavityMesh = "quadriped_Rear-Left-cavity_collis.stl"
                    rearRightCavityMesh = "quadriped_Rear-Right-cavity_collis.stl"
                    frontLeftCavityMesh = "quadriped_Front-Left-cavity_collis.stl"
                    frontRightCavityMesh = "quadriped_Front-Right-cavity_collis.stl"
                ##########################################
                # FEM Model
                model = rootNode.createChild('model')
                model.createObject('EulerImplicit', name='odesolver',firstOrder="false", rayleighStiffness='0.1', rayleighMass='0.1')
                model.createObject('SparseLDLSolver', name='preconditioner', template="CompressedRowSparseMatrix3d")
                model.createObject('MeshVTKLoader', name='loader', filename=path+quadrupedMesh)
                model.createObject('TetrahedronSetTopologyContainer', src='@loader', name='container')
                model.createObject('MechanicalObject', name='tetras', template='Vec3d', showIndices='false', showIndicesScale='4e-5', rx='0')
                model.createObject('UniformMass', totalMass='0.035')
                model.createObject('TetrahedronFEMForceField', template='Vec3d', name='FEM', method='large', poissonRatio='0.05',  youngModulus='70', drawAsEdges="1")
                model.createObject('BoxROI', name='boxROISubTopo', box='0 0 0 150 -100 1', drawBoxes='true')
                model.createObject('BoxROI', name='membraneROISubTopo', box='0 0 -0.1 150 -100 0.1',computeTetrahedra="false", drawBoxes='true')
                model.createObject('GenericConstraintCorrection', solverName='preconditioner')


                ##########################################
                # Sub topology
                modelSubTopo = model.createChild('modelSubTopo')

                modelSubTopo.createObject('TriangleSetTopologyContainer', position='@../membraneROISubTopo.pointsInROI', triangles='@../membraneROISubTopo.trianglesInROI', name='container')
                modelSubTopo.createObject('TriangleFEMForceField', template='Vec3d', name='FEM', method='large', poissonRatio='0.49',  youngModulus='5000')

                #model.createObject('BoxROI', name='boxROI', box='15 -15 -10 3 -60 60', drawBoxes= '1')
                #model.createObject('RestShapeSpringsForceField', name = 'fixedForceField', points='@boxROI.indices', stiffness='1e8')
		##########################################
                # Constraint
                centerCavity = model.createChild('centerCavity')
                centerCavity.createObject('MeshSTLLoader', name='loader', filename=path+centerCavityMesh)
                centerCavity.createObject('Mesh', src='@loader', name='topo')
                centerCavity.createObject('MechanicalObject', name='centerCavity')
                centerCavity.createObject('SurfacePressureConstraint', name="SurfacePressureConstraint", template='Vec3d', value="0.00", triangles='@topo.triangles', drawPressure='0', drawScale='0.0002', valueType="volumeGrowth")
                centerCavity.createObject('BarycentricMapping', name='mapping',  mapForces='false', mapMasses='false')

                rearLeftCavity = model.createChild('rearLeftCavity')
                rearLeftCavity.createObject('MeshSTLLoader', name='loader', filename=path+rearLeftCavityMesh)
                rearLeftCavity.createObject('Mesh', src='@loader', name='topo')
                rearLeftCavity.createObject('MechanicalObject', name='rearLeftCavity')
                rearLeftCavity.createObject('SurfacePressureConstraint', name="SurfacePressureConstraint", template='Vec3d', valueType="volumeGrowth", value="0.000", triangles='@topo.triangles', drawPressure='0', drawScale='0.0002')
                rearLeftCavity.createObject('BarycentricMapping', name='mapping',  mapForces='false', mapMasses='false')

                rearRightCavity = model.createChild('rearRightCavity')
                rearRightCavity.createObject('MeshSTLLoader', name='loader', filename=path+rearRightCavityMesh)
                rearRightCavity.createObject('Mesh', src='@loader', name='topo')
                rearRightCavity.createObject('MechanicalObject', name='rearRightCavity')
                rearRightCavity.createObject('SurfacePressureConstraint', name="SurfacePressureConstraint", template='Vec3d', value="0.00", triangles='@topo.triangles', drawPressure='0', drawScale='0.0002', valueType="volumeGrowth")
                rearRightCavity.createObject('BarycentricMapping', name='mapping',  mapForces='false', mapMasses='false')


                frontLeftCavity = model.createChild('frontLeftCavity')
                frontLeftCavity.createObject('MeshSTLLoader', name='loader', filename=path+frontLeftCavityMesh)
                frontLeftCavity.createObject('Mesh', src='@loader', name='topo')
                frontLeftCavity.createObject('MechanicalObject', name='frontLeftCavity')
                frontLeftCavity.createObject('SurfacePressureConstraint', name="SurfacePressureConstraint", template='Vec3d', value="0.000", triangles='@topo.triangles', drawPressure='0', drawScale='0.0002', valueType="volumeGrowth")
                frontLeftCavity.createObject('BarycentricMapping', name='mapping',  mapForces='false', mapMasses='false')


                frontRightCavity = model.createChild('frontRightCavity')
                frontRightCavity.createObject('MeshSTLLoader', name='loader', filename=path+frontRightCavityMesh)
                frontRightCavity.createObject('Mesh', src='@loader', name='topo')
                frontRightCavity.createObject('MechanicalObject', name='frontRightCavity')
                frontRightCavity.createObject('SurfacePressureConstraint', name="SurfacePressureConstraint", template='Vec3d', value="0.000", triangles='@topo.triangles', drawPressure='0', drawScale='0.0002', valueType="volumeGrowth")
                frontRightCavity.createObject('BarycentricMapping', name='mapping',  mapForces='false', mapMasses='false')

                modelCollis = model.createChild('modelCollis')
		modelCollis.createObject('MeshSTLLoader', name='loader', filename=path+'quadriped_collision.stl', rotation="0 0 0", translation="0 0 0")
		modelCollis.createObject('TriangleSetTopologyContainer', src='@loader', name='container')
		modelCollis.createObject('MechanicalObject', name='collisMO', template='Vec3d')
		modelCollis.createObject('Triangle',group="0")
		modelCollis.createObject('Line',group="0")
		modelCollis.createObject('Point',group="0")
		modelCollis.createObject('BarycentricMapping')


		##########################################
                # Visualization
                #modelVisu = model.createChild('visu')
                #modelVisu.createObject(  'MeshSTLLoader', name= 'loader', filename=path+"quadriped_collision.stl")

                #modelVisu.createObject(  'OglModel',
                                   # src='@loader',
                                   # template='ExtVec3f',
                                   # color='0.7 0.7 0.7 0.6')

               # modelVisu.createObject('BarycentricMapping')

                planeNode = rootNode.createChild('Plane')
		planeNode.createObject('MeshObjLoader', name='loader', filename="mesh/floorFlat.obj", triangulate="true")
		planeNode.createObject('Mesh', src="@loader")
		planeNode.createObject('MechanicalObject', src="@loader", rotation="90 0 0", translation="0 35 -1", scale="15")
		planeNode.createObject('Triangle',simulated="0", moving="0",group="1")
		planeNode.createObject('Line',simulated="0", moving="0",group="1")
		planeNode.createObject('Point',simulated="0", moving="0",group="1")
		planeNode.createObject('OglModel',name="Visual", fileMesh="mesh/floorFlat.obj", color="1 0 0 1",rotation="90 0 0", translation="0 35 -1", scale="15")
		planeNode.createObject('UncoupledConstraintCorrection')

                return rootNode
